// SBML level 2 version 4

function Constant_flux__irreversible(v)
  v;
end
Constant_flux__irreversible is "Constant flux (irreversible)";

function Henri_Michaelis_Menten__irreversible(substrate, Km, V)
  V*substrate/(Km + substrate);
end
Henri_Michaelis_Menten__irreversible is "Henri-Michaelis-Menten (irreversible)";

function MM1(k, E, S, km)
  k*E*S/(km + S);
end

function MM2__1(k, E, A, B, Kma, Kmb)
  k*E*A*B/(Kma*Kmb + A*Kma + B*Kmb + A*B);
end
MM2__1 is "MM2 [1]";

model M1()

  // Compartments:
  compartment c = 1e-12;

  // Species:
  species GSH in c = 1045000;
  // M1= 60
  // M2 = 100
  species GPX4 in c = 60;
  species GSSG in c = 1045000;
  species PE_AA_OOH in c = 0; PE_AA_OOH is "OOH-AA-PE";
  species PE_AA_OH in c = 0; PE_AA_OH is "OH-AA-PE";
  // M1= 3
  // M2 = 10
  species LOX in c = 4; LOX is "15LOXFe3";
  species $measurement_death in c;
  species PE_AA in c = 0.001; PE_AA is "AA-PE";
  species AA in c = 1;
  // M1= 0.68
  // M2 =0.85
  species ACSL4_LCAT3 in c = 0.68; ACSL4_LCAT3 is "ACSL4/LPCAT3";
  species RSL3 in c = 500;
  species LOXi in c = 0; LOXi is "15LOXFe2";
  species NO in c = 0;
  // M1=26
  // M2=1
  species iNos in c = 10; iNos is "iNOS";
  species PEoxtr in c = 0;
  species NO_PEoxtr in c = 0; NO_PEoxtr is "NO-PEoxtr";
  species NO_PE in c = 1; NO_PE is "NO-PE";
  species SNAP in c = 0;
  species L_NIL in c = 0; L_NIL is "L-NIL";

  // Parameters:
  death = 0;
  scaling_death = 9.24027;
  scavenging_rate = 0.001;
  Initial_for_scaling_death = scaling_death;

  // Assignment rules:
  measurement_death := death*Initial_for_scaling_death/(time + 1);

  // Rate rules:
  death' = PEoxtr + PE_AA_OOH;

  // Reactions:
  GPX4_0: GSH + PE_AA_OOH => GSSG + PE_AA_OH; c*MM2__1(GPX4_0_k, GPX4, GSH, PE_AA_OOH, Kma, Kmb); GPX4_0 is "r04";  // modifiers: GPX4
    GPX4_0_k = 756.429; Kma = 8599.98; Kmb = 1850410;
  GR_0: GSSG => GSH; c*Henri_Michaelis_Menten__irreversible(GSSG, GR_0_Km, GR_0_V); GR_0 is "r13";
    GR_0_Km = 17748.5; GR_0_V = 115306;
  PE_AA_OOH_production: PE_AA => PE_AA_OOH; c*MM1(PE_AA_OOH_production_k, LOX, PE_AA, PE_AA_OOH_production_km); PE_AA_OOH_production is "r03";  // modifiers: LOX
    PE_AA_OOH_production_k = 0.1161; PE_AA_OOH_production_km = 9514.37;
  PE_AA_OH_degradation: PE_AA_OH => ; c*PE_AA_OH_degradation_k1*PE_AA_OH; PE_AA_OH_degradation is "r05";
    PE_AA_OH_degradation_k1 = 0.1;
  GPX4_basal: GSH => GSSG; c*MM1(GPX4_basal_k, GPX4, GSH, GPX4_basal_km); GPX4_basal is "r17";  // modifiers: GPX4
    GPX4_basal_k = 1146.67; GPX4_basal_km = 12978.2;
  AA_production: => AA; c*Constant_flux__irreversible(v); AA_production is "r01";
    v = 1;
  ACSL4_LCAT3_0: AA => PE_AA; c*MM1(ACSL4_LCAT3_0_k, ACSL4_LCAT3, AA, ACSL4_LCAT3_0_km); ACSL4_LCAT3_0 is "r02";  // modifiers: ACSL4_LCAT3
    ACSL4_LCAT3_0_k = 10; ACSL4_LCAT3_0_km = 1000;
  LOX_production: LOXi => LOX; c*Henri_Michaelis_Menten__irreversible(LOXi, LOX_production_Km, LOX_production_V); LOX_production is "r07";
    LOX_production_Km = 52.3; LOX_production_V = 0.098;
  LOX_degradation: LOX => LOXi; c*MM1(LOX_degradation_k, NO, LOX, LOX_degradation_km); LOX_degradation is "r08";  // modifiers: NO
    LOX_degradation_k = 0.1; LOX_degradation_km = 50;
  RSL3_0: RSL3 + GPX4 => RSL3; c*RSL3_0_k1*RSL3*GPX4; RSL3_0 is "r15";
    RSL3_0_k1 = 6.58678e-5;
  RSL3_degradation: RSL3 => ; c*RSL3_degradation_k1*RSL3; RSL3_degradation is "r16";
    RSL3_degradation_k1 = 0.0012335;
  n01: iNos => NO + iNos; c*n01_k1*iNos; n01 is "r09";
    n01_k1 = 0.01;
  r10: NO => ; c*r10_k1*NO;
    r10_k1 = 0.01;
  r06: PE_AA_OOH => PEoxtr; c*r06_k1*PE_AA_OOH;
    r06_k1 = 0.1;
  r12: PEoxtr + NO => NO_PEoxtr; c*scavenging_rate*PEoxtr*NO;
  r11: PE_AA_OOH + NO => NO_PE; c*scavenging_rate*PE_AA_OOH*NO;
  r18: SNAP => NO + SNAP; c*r18_k1*SNAP;
    r18_k1 = 0.1;
  r14: iNos + L_NIL => L_NIL; c*r14_k1*iNos*L_NIL;
    r14_k1 = 0.1;

  // Unit definitions:
  unit time = 60 second;
  unit substance = 1e-9 mole;
end
